Vel_max := 13 m/s = 46.8 kph  # absolute max velocity i'd like to measure
MIN := 0
TYP := 1
tol(t) := [1 - t; 1; 1 + t]
R_tol_ppm(t, PPM, ΔT_max) := [(1 - t)*(1 - PPM/1000000*ΔT_max); 1; (1 + t)*(1 + PPM/1000000*ΔT_max)]
MAX := 2
D_wheel_diam := 8.28 cm  # hub motor wheel diam
N_poles := 10  # number of magnetic poles in the motor. Each hall sensor has this many full periods per motor rotation
C_tol(t, tempD, ageD, t_age_referee, DCD, t_lifetime_min) := [1 - (t + tempD + ageD*log(t_lifetime_min/t_age_referee) + DCD); 1; 1 + t]
C_wheel_circ := D_wheel_diam*π
check(statement) := if(statement, "OK", error("FAIL"))
f_rot_max := Vel_max/C_wheel_circ = 49.9762 Hz
check_non_critical(statement) := if(statement, "OK", "ah well")
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f_hall_max := f_rot_max*N_poles = 499.762 Hz
T_range := [-5; 25; 60]
ΔT_max := max(abs(T_range[MAX] - T_range[TYP]), abs(T_range[MIN] - T_range[TYP]))
# the rising edge of the signal is all pull-ups, the falling edge is the hall sensor's BJT transistor,
# so there are filters to be calculated.
t_lifetime_min := 5 yr
R_tol_ppm(t, PPM) := R_tol_ppm(t, PPM, ΔT_max)
C_tol(t, tempD, ageD, t_age_referee, DCD) := C_tol(t, tempD, ageD, t_age_referee, DCD, t_lifetime_min)
ageD_C0G := 0%
t_C0G_ref := 1 s
ageD_X7R := 3%
t_X7R_ref := 1000 hr  # https://www.digikey.com/Site/Global/Layouts/DownloadPdf.ashx?pdfUrl=91D84559BB484E21BD284CC0B41A4783
# falstad sim:  https://tinyurl.com/2dlqjob6
ageD_X5R := 5%
t_X5R_ref := 48 hr
C_1_TOL := C_tol(5%, 1%, ageD_C0G, t_C0G_ref, 0%)  # not the real tolerances
R_filter := (2.2 kΩ + 510 Ω)*R_tol_ppm(10%, 100)  # not the real tolerances
C_1_upper_limit := 1/(2*π*f_hall_max*R_filter[MAX]*C_1_TOL[MAX]) = 101.388 nF
C_1 := 100*C_1_TOL nF  # standardized capacitor value
f_cutoff_f(C_1_f, R_filter_f) := vectorize(1/(2*π*C_1_f*R_filter_f))
f_cutoff := f_cutoff_f(reverse(C_1), reverse(R_filter)) = [506.701; 587.288; 696.632] Hz
check(f_cutoff[MIN] ≥ f_hall_max) = "OK"
